// COMSOL Multiphysics 6.2.0.290 model "FEM_COMSOL_EXP_Lepine_limestone.mph"
// Outline of the model tree

Geometry
  geom1 "Geometry 1" (1D, length unit mm)
    i1: Interval | coord = {0, 7}
    fin: Finalize "Form Union"

Physics
  c: CoefficientFormPDE on all domains
    dependent variable u
    EquationForm.form = Automatic
    cfeq1: CoefficientFormPDE (default) | c = 0.0000000063*exp(4.9*((u-0.0)/(0.239-0.0))); f = 0; da = 1
    zflx1: ZeroFluxBoundary "Zero Flux 1" (default)
    init1: init "Initial Values 1" (default) | u = 0.0
    dir1: DirichletBoundary "Dirichlet Boundary Condition 1" on boundaries 1 | r = 0.239
    dir2: DirichletBoundary "Dirichlet Boundary Condition 2" on boundaries 2 | r = 0.0

Mesh
  mesh1 "Mesh 1" (physics-controlled)
    size: MeshSizeDefault | hauto = 1

Studies
  std1 "Study 1"
    time: Transient "Time Dependent" | tunit = min; tlist = range(0,0.01,1)

Solver configurations
  sol1 "Solution 1" (study std1)
    v1: Variables "Dependent Variables 1"
    t1: Time "Time-Dependent Solver 1" | tlist = range(0,0.01,1)
      dDef: Direct
      fc1: FullyCoupled | linsolver = dDef

Datasets
  dset1: Solution | solution = sol1

Plots
  pg1: PlotGroup1D "Coefficient Form PDE" | data = dset1
    lngr1: LineGraph on domains 1 | expr = u; xdata = expr; xdataexpr = x

Exports
  data1: Data
    data = dset1
    expr = u
    filename = C:\Users\ferna\OneDrive\Documents\Tesis_PINNs_Richards\FEMData_Tesis_PINNs_Richards\FEM_COMSOL_EXP_Lepine_limestone.txt
    separator = ,